<?xml version="1.0"?>
<?xml-stylesheet type="text/xsl" href="http://jsbsim.sourceforge.net/JSBSim.xsl"?>
<fdm_config name="L1011-500" version="2.0" release="ALPHA"
   xmlns:xsi="http://www.w3.org/2001/XMLSchema-instance"
   xsi:noNamespaceSchemaLocation="http://jsbsim.sourceforge.net/JSBSim.xsd">

 <fileheader>
  <author> Aeromatic v 0.9 </author>
  <filecreationdate> 2009-02-26 </filecreationdate>
  <version>$Revison: $</version>
  <description> Models a L1011-1, based on data from L1011-500</description>
 </fileheader>

<!--
  File:     L1011-1.xml
  Inputs:
    name:          L1011-500
    type:          three-engine transonic transport
    max weight:    496000 lb
    wing span:     164.35 ft
    length:        164.35 ft
    wing area:     3539.5 sq-ft
    gear type:     tricycle
    retractable?:  yes
    # engines:     3
    engine type:   turbine
    engine layout: wings and tail
    yaw damper?    yes
  Outputs:
    wing loading:  140.13 lb/sq-ft
    CL-alpha:      4.4 per radian
    CL-0:          0.2
    CL-max:        1.2
    CD-0:          0.019
    K:             0.042

-->

 <metrics>
   <wingarea  unit="FT2"> 3539.50 </wingarea>
   <wingspan  unit="FT" >  164.35 </wingspan>
   <wing_incidence>          2.00 </wing_incidence>
   <chord     unit="FT" >   21.54 </chord>
   <htailarea unit="FT2"> 1282.00 </htailarea>
   <htailarm  unit="FT" >   71.70 </htailarm>
   <vtailarea unit="FT2">  707.90 </vtailarea>
   <vtailarm  unit="FT" >   73.96 </vtailarm>
   <location name="AERORP" unit="IN">
     <x>   0.00</x>
     <y>   0.00 </y>
     <z>   0.00 </z>
   </location>
   <location name="EYEPOINT" unit="IN">
     <x> 138.05 </x>
     <y> -30.00 </y>
     <z>  75.00 </z>
   </location>
   <location name="VRP" unit="IN">
     <x>0</x>
     <y>0</y>
     <z>0</z>
   </location>
 </metrics>

 <mass_balance>
   <ixx unit="SLUG*FT2">3900646</ixx>
   <iyy unit="SLUG*FT2">8088379</iyy>
   <izz unit="SLUG*FT2">13786442</izz>
   <emptywt unit="LBS">247118</emptywt>
   <location name="CG" unit="M">
     <x>0.00</x>
     <y>0.00</y>
     <z>-1.25222</z>
   </location>
 <pointmass name="Ballast_Engine1">
     <location unit="M">
      <x>-0.68996</x>
      <y>-10.58844</y>
      <z>-2.31989</z>
     </location>
   <weight unit="KG">4452</weight>
  </pointmass>
 <pointmass name="Ballast_Engine2">
    <location unit="M">
       <x>15.81330</x>
       <y>0.00</y>
       <z>5.35443</z>
    </location>
   <weight unit="KG">4452</weight>
  </pointmass>
 <pointmass name="Ballast_Engine3">
    <location unit="M">
      <x>-0.68996</x>
      <y>10.58844</y>
      <z>-2.31989</z>
    </location>
   <weight unit="KG">4452</weight>
  </pointmass>
 <pointmass name="Ballast_Fore">
    <location unit="M">
      <x>-17.92780</x>
      <y>0.00</y>
      <z>0.50</z>
    </location>
   <weight unit="KG">12500</weight>
  </pointmass>
 </mass_balance>

 <ground_reactions>

  <contact type="BOGEY" name="NOSE">
   <location unit="IN">
     <x> -626.111 </x>
     <y>    0.000 </y>
     <z> -156.377 </z>
   </location>
   <static_friction>  0.80 </static_friction>
   <dynamic_friction> 0.50 </dynamic_friction>
   <rolling_friction> 0.02 </rolling_friction>
   <spring_coeff unit="LBS/FT">      148800.00 </spring_coeff>
   <damping_coeff unit="LBS/FT/SEC"> 49600.00 </damping_coeff>
   <max_steer unit="DEG"> 60.00 </max_steer>
   <brake_group>NONE</brake_group>
   <retractable>1</retractable>
 </contact>

  <contact type="BOGEY" name="LEFT_MAIN">
   <location unit="IN">
     <x> 221.968 </x>
     <y>-210.678 </y>
     <z>-144.297 </z>
   </location>
   <static_friction>  0.80 </static_friction>
   <dynamic_friction> 0.50 </dynamic_friction>
   <rolling_friction> 0.02 </rolling_friction>
   <spring_coeff unit="LBS/FT">      496000.00 </spring_coeff>
   <damping_coeff unit="LBS/FT/SEC"> 99200.00 </damping_coeff>
   <max_steer unit="DEG">0</max_steer>
   <brake_group>LEFT</brake_group>
   <retractable>1</retractable>
 </contact>

  <contact type="BOGEY" name="RIGHT_MAIN">
   <location unit="IN">
     <x> 221.968 </x>
     <y> 210.678 </y>
     <z>-144.297 </z>
   </location>
   <static_friction>  0.80 </static_friction>
   <dynamic_friction> 0.50 </dynamic_friction>
   <rolling_friction> 0.02 </rolling_friction>
   <spring_coeff unit="LBS/FT">      496000.00 </spring_coeff>
   <damping_coeff unit="LBS/FT/SEC"> 99200.00 </damping_coeff>
   <max_steer unit="DEG">0</max_steer>
   <brake_group>RIGHT</brake_group>
   <retractable>1</retractable>
 </contact>

  <contact type="STRUCTURE" name="LEFT_WING">
    <location unit="IN">
     <x>  639.57 </x>
     <y> -930.47 </y>
     <z>   76.57 </z>
    </location>
    <static_friction>  0.80 </static_friction>
    <dynamic_friction> 0.50 </dynamic_friction>
    <spring_coeff unit="LBS/FT">      496000.00 </spring_coeff>
    <damping_coeff unit="LBS/FT/SEC"> 99200.00 </damping_coeff>
 </contact>

  <contact type="STRUCTURE" name="RIGHT_WING">
    <location unit="IN">
     <x>  639.57 </x>
     <y>  930.47 </y>
     <z>   76.57 </z>
    </location>
    <static_friction>  0.80 </static_friction>
    <dynamic_friction> 0.50 </dynamic_friction>
    <spring_coeff unit="LBS/FT">      496000.00 </spring_coeff>
    <damping_coeff unit="LBS/FT/SEC"> 99200.00 </damping_coeff>
 </contact>

  <contact type="STRUCTURE" name="LEFT_ENGINE">
    <location unit="IN">
     <x>  -52.47 </x>
     <y> -389.83 </y>
     <z> -117.54 </z>
    </location>
    <static_friction>  0.80 </static_friction>
    <dynamic_friction> 0.50 </dynamic_friction>
    <spring_coeff unit="LBS/FT">      496000.00 </spring_coeff>
    <damping_coeff unit="LBS/FT/SEC"> 99200.00 </damping_coeff>
 </contact>

  <contact type="STRUCTURE" name="RIGHT_ENGINE">
    <location unit="IN">
     <x>  -52.47 </x>
     <y>  389.83 </y>
     <z> -117.54 </z>
    </location>
    <static_friction>  0.80 </static_friction>
    <dynamic_friction> 0.50 </dynamic_friction>
    <spring_coeff unit="LBS/FT">      496000.00 </spring_coeff>
    <damping_coeff unit="LBS/FT/SEC"> 99200.00 </damping_coeff>
 </contact>

 </ground_reactions>

 <propulsion>

   <engine file="RB211-524B">
    <location unit="M">
      <x>-0.68996</x>
      <y>-10.58844</y>
      <z>-2.31989</z>
    </location>
    <orient unit="DEG">
      <pitch>0.00</pitch>
      <roll>0.00</roll>
      <yaw>0.00</yaw>
    </orient>
    <feed>1</feed>
    <thruster file="direct">
     <location unit="M">
      <x>-0.68996</x>
      <y>-10.58844</y>
      <z>-2.31989</z>
     </location>
     <orient unit="DEG">
       <pitch>0.00</pitch>
       <roll>0.00</roll>
       <yaw>0.00</yaw>
     </orient>
    </thruster>
  </engine>

   <engine file="RB211-524B">
    <location unit="M">
       <x>15.81330</x>
       <y>0.00</y>
       <z>5.35443</z>
    </location>
    <orient unit="DEG">
      <pitch>0.00</pitch>
      <roll>0.00</roll>
      <yaw>0.00</yaw>
    </orient>
    <feed>0</feed>
    <feed>5</feed>
    <thruster file="direct">
     <location unit="M">
       <x>15.81330</x>
       <y>0.00</y>
       <z>5.35443</z>
     </location>
     <orient unit="DEG">
       <pitch>0.00</pitch>
       <roll>0.00</roll>
       <yaw>0.00</yaw>
     </orient>
    </thruster>
  </engine>

   <engine file="RB211-524B">
    <location unit="M">
      <x>-0.68996</x>
      <y>10.58844</y>
      <z>-2.31989</z>
    </location>
    <orient unit="DEG">
      <pitch>0.00</pitch>
      <roll>0.00</roll>
      <yaw>0.00</yaw>
    </orient>
    <feed>4</feed>
    <thruster file="direct">
     <location unit="M">
      <x>-0.68996</x>
      <y>10.58844</y>
      <z>-2.31989</z>
     </location>
     <orient unit="DEG">
       <pitch>0.00</pitch>
       <roll>0.00</roll>
       <yaw>0.00</yaw>
     </orient>
    </thruster>
  </engine>

  <tank type="FUEL" number="2L">
     <location unit="IN">
       <x>    0.00 </x>
       <y> -400.00 </y>
       <z>    0.00 </z>
     </location>
     <capacity unit="LBS"> 25650.00 </capacity>
     <contents unit="LBS"> 25650.00 </contents>
  </tank>

  <tank type="FUEL" number="1">
     <location unit="IN">
       <x>    0.00 </x>
       <y> -100.00 </y>
       <z>    0.00 </z>
     </location>
     <capacity unit="LBS"> 53970.00 </capacity>
     <contents unit="LBS"> 53970.00 </contents>
  </tank>

  <tank type="FUEL" number="1A">
     <location unit="IN">
       <x>    0.00 </x>
       <y>    0.00 </y>
       <z>    0.00 </z>
     </location>
     <capacity unit="LBS"> 27200.00 </capacity>
     <contents unit="LBS"> 27200.00 </contents>
  </tank>

  <tank type="FUEL" number="3A">
     <location unit="IN">
       <x>    0.00 </x>
       <y>    0.00 </y>
       <z>    0.00 </z>
     </location>
     <capacity unit="LBS"> 27200.00 </capacity>
     <contents unit="LBS"> 27200.00 </contents>
  </tank>

  <tank type="FUEL" number="3">
     <location unit="IN">
       <x>    0.00 </x>
       <y>  100.00 </y>
       <z>    0.00 </z>
     </location>
     <capacity unit="LBS"> 53970.00 </capacity>
     <contents unit="LBS"> 53970.00 </contents>
  </tank>

  <tank type="FUEL" number="2R">
     <location unit="IN">
       <x>    0.00 </x>
       <y>  400.00 </y>
       <z>    0.00 </z>
     </location>
     <capacity unit="LBS"> 25650.00 </capacity>
     <contents unit="LBS"> 25650.00 </contents>
  </tank>

 </propulsion>

 <system file="pushback"/>

 <flight_control name="FCS: L1011-500">

  <channel name="Pitch">
   <summer name="Pitch Trim Sum">
      <input>fcs/elevator-cmd-norm</input>
      <input>fcs/pitch-trim-cmd-norm</input>
      <clipto>
        <min> -1 </min>
        <max>  1 </max>
      </clipto>
   </summer>

   <aerosurface_scale name="Elevator Control">
      <input>fcs/pitch-trim-sum</input>
      <range>
        <min> -0.35 </min>
        <max>  0.35 </max>
      </range>
      <output>fcs/elevator-pos-rad</output>
   </aerosurface_scale>

   <aerosurface_scale name="elevator normalization">
      <input>fcs/elevator-pos-rad</input>
      <domain>
        <min> -0.35 </min>
        <max>  0.35 </max>
      </domain>
      <range>
        <min> -1 </min>
        <max>  1 </max>
      </range>
      <output>fcs/elevator-pos-norm</output>
   </aerosurface_scale>

  </channel>

  <channel name="Roll">
   <summer name="Roll Trim Sum">
      <input>fcs/aileron-cmd-norm</input>
      <input>fcs/roll-trim-cmd-norm</input>
      <clipto>
        <min> -1 </min>
        <max>  1 </max>
      </clipto>
   </summer>

   <aerosurface_scale name="Left Aileron Control">
      <input>fcs/roll-trim-sum</input>
      <range>
        <min> -0.35 </min>
        <max>  0.35 </max>
      </range>
      <output>fcs/left-aileron-pos-rad</output>
   </aerosurface_scale>

   <aerosurface_scale name="Right Aileron Control">
      <input>fcs/roll-trim-sum</input>
      <range>
        <min> -0.35 </min>
        <max>  0.35 </max>
      </range>
      <output>fcs/right-aileron-pos-rad</output>
   </aerosurface_scale>

   <aerosurface_scale name="left aileron normalization">
      <input>fcs/left-aileron-pos-rad</input>
      <domain>
        <min> -0.35 </min>
        <max>  0.35 </max>
      </domain>
      <range>
        <min> -1 </min>
        <max>  1 </max>
      </range>
      <output>fcs/left-aileron-pos-norm</output>
   </aerosurface_scale>

   <aerosurface_scale name="right aileron normalization">
      <input>fcs/right-aileron-pos-rad</input>
      <domain>
        <min> -0.35 </min>
        <max>  0.35 </max>
      </domain>
      <range>
        <min> -1 </min>
        <max>  1 </max>
      </range>
      <output>fcs/right-aileron-pos-norm</output>
   </aerosurface_scale>

  </channel>

  <channel name="Yaw">
   <summer name="Rudder Command Sum">
      <input>fcs/rudder-cmd-norm</input>
      <input>fcs/yaw-trim-cmd-norm</input>
      <clipto>
        <min> -0.35 </min>
        <max>  0.35 </max>
      </clipto>
   </summer>

   <scheduled_gain name="Yaw Damper Rate">
      <input>velocities/r-aero-rad_sec</input>
      <table>
        <independentVar lookup="row">velocities/ve-kts</independentVar>
         <tableData>
            30     0.00
            60     2.00
         </tableData>
      </table>
   </scheduled_gain>

   <scheduled_gain name="Yaw Damper Beta">
      <input>aero/beta-rad</input>
      <table>
        <independentVar lookup="row">velocities/ve-kts</independentVar>
        <tableData>
           30     0.00
           60     0.00
        </tableData>
      </table>
   </scheduled_gain>

   <summer name="Yaw Damper Sum">
      <input>fcs/yaw-damper-beta</input>
      <input>fcs/yaw-damper-rate</input>
      <clipto>
        <min> -0.1 </min>
        <max>  0.1 </max>
      </clipto>
   </summer>

   <scheduled_gain name="Yaw Damper Final">
      <input>fcs/yaw-damper-sum</input>
      <table>
        <independentVar lookup="row">velocities/ve-kts</independentVar>
        <tableData>
           30         0.0
           31         1.0
        </tableData>
      </table>
   </scheduled_gain>

   <summer name="Rudder Sum">
      <input>fcs/rudder-command-sum</input>
      <input>fcs/yaw-damper-final</input>
      <clipto>
        <min> -1 </min>
        <max>  1 </max>
      </clipto>
   </summer>

   <aerosurface_scale name="Rudder Control">
      <input>fcs/rudder-sum</input>
      <range>
        <min> -0.35 </min>
        <max>  0.35 </max>
      </range>
      <output>fcs/rudder-pos-rad</output>
   </aerosurface_scale>

   <aerosurface_scale name="rudder normalization">
      <input>fcs/rudder-pos-rad</input>
      <domain>
        <min> -0.35 </min>
        <max>  0.35 </max>
      </domain>
      <range>
        <min> -1 </min>
        <max>  1 </max>
      </range>
      <output>fcs/rudder-pos-norm</output>
   </aerosurface_scale>

  </channel>

  <channel name="Flaps">
   <kinematic name="Flaps Control">
     <input>fcs/flap-cmd-norm</input>
     <traverse>
       <setting>
          <position>  0 </position>
          <time>      0 </time>
       </setting>
       <setting>
          <position>  4 </position>
          <time>      5 </time>
       </setting>
       <setting>
          <position> 10 </position>
          <time>      5 </time>
       </setting>
       <setting>
          <position> 14 </position>
          <time>      5 </time>
       </setting>
       <setting>
          <position> 18 </position>
          <time>      5 </time>
       </setting>
       <setting>
          <position> 22 </position>
          <time>      5 </time>
       </setting>
       <setting>
          <position> 33 </position>
          <time>      5 </time>
       </setting>
     </traverse>
     <output>fcs/flap-pos-deg</output>
   </kinematic>

   <aerosurface_scale name="flap normalization">
      <input>fcs/flap-pos-deg</input>
      <domain>
        <min>  0 </min>
        <max> 33 </max>
      </domain>
      <range>
        <min> 0 </min>
        <max> 1 </max>
      </range>
      <output>fcs/flap-pos-norm</output>
   </aerosurface_scale>

  </channel>

  <channel name="Landing Gear">

   <kinematic name="Gear Control">
     <input>gear/gear-cmd-norm</input>
     <traverse>
       <setting>
          <position> 0 </position>
          <time>     0 </time>
       </setting>
       <setting>
          <position> 1 </position>
          <time>     5 </time>
       </setting>
     </traverse>
     <output>gear/gear-pos-norm</output>
   </kinematic>

  </channel>

  <property value="0">/instrumentation/nav/gs-needle-deflection</property>
  <channel name="Speedbrake">

   <scheduled_gain name="Direct Lift Enable">
     <input>gear/gear-cmd-norm</input>
      <table>
        <independentVar lookup="row">fcs/flap-pos-deg</independentVar>
        <tableData>
           30         0.0
           31         1.0
        </tableData>
      </table>
   </scheduled_gain>

   <scheduled_gain name="Direct Lift Control">
     <input>fcs/direct-lift-enable</input>
      <table>
        <independentVar lookup="row">/instrumentation/nav/gs-needle-deflection</independentVar>
        <tableData>
           -10         0.2857
             0         0.1286
            10         0.0
        </tableData>
      </table>
   </scheduled_gain>

   <summer name="Spoiler Sum">
      <input>fcs/direct-lift-control</input>
      <input>fcs/speedbrake-cmd-norm</input>
      <clipto>
        <min> 0.0 </min>
        <max> 1.0 </max>
      </clipto>
   </summer>

    <kinematic name="Spoiler Control">
     <input>fcs/spoiler-sum</input>
     <traverse>
       <setting>
          <position> 0 </position>
          <time>     0 </time>
       </setting>
       <setting>
          <position> 1 </position>
          <time>     1 </time>
       </setting>
     </traverse>
     <output>fcs/spoiler-pos-norm</output>
   </kinematic>

  <kinematic name="Speedbrake Control">
     <input>fcs/speedbrake-cmd-norm</input>
     <traverse>
       <setting>
          <position> 0 </position>
          <time>     0 </time>
       </setting>
       <setting>
          <position> 1 </position>
          <time>     1 </time>
       </setting>
     </traverse>
     <output>fcs/speedbrake-pos-norm</output>
   </kinematic>

   <aerosurface_scale name="Spoiler Position">
      <input>fcs/spoiler-pos-norm</input>
      <domain>
        <min>  0 </min>
        <max>  1 </max>
      </domain>
      <range>
        <min> 0 </min>
        <max>70 </max>
      </range>
      <output>fcs/spoiler-pos-deg</output>
   </aerosurface_scale>

   <aerosurface_scale name="Speedbrake Position">
      <input>fcs/speedbrake-pos-norm</input>
      <domain>
        <min>  0 </min>
        <max>  1 </max>
      </domain>
      <range>
        <min> 0 </min>
        <max>70 </max>
      </range>
      <output>fcs/speedbrake-pos-deg</output>
   </aerosurface_scale>

  </channel>

 </flight_control>

 <aerodynamics>

  <axis name="LIFT">

    <function name="aero/coefficient/CLalpha">
      <description>Lift_due_to_alpha</description>
      <product>
          <property>aero/qbar-psf</property>
          <property>metrics/Sw-sqft</property>
          <table>
            <independentVar lookup="row">aero/alpha-rad</independentVar>
            <tableData>
              -5.00 0.000
              -0.20 0.120
               0.00 0.500
               0.23 2.480
               0.60 0.600
            </tableData>
          </table>
      </product>
    </function>

    <function name="aero/coefficient/dCLflap">
       <description>Delta_Lift_due_to_flaps</description>
       <product>
           <property>aero/qbar-psf</property>
           <property>metrics/Sw-sqft</property>
           <property>fcs/flap-pos-deg</property>
           <value>0.05000</value>
       </product>
    </function>

    <function name="aero/coefficient/dCLsb">
       <description>Delta_Lift_due_to_speedbrake</description>
       <product>
           <property>aero/qbar-psf</property>
           <property>metrics/Sw-sqft</property>
           <property>fcs/speedbrake-pos-norm</property>
           <value>-0.09</value>
       </product>
    </function>

    <function name="aero/coefficient/dCLsp">
       <description>Delta_Lift_due_to_spoiler</description>
       <product>
           <property>aero/qbar-psf</property>
           <property>metrics/Sw-sqft</property>
           <property>fcs/spoiler-pos-norm</property>
           <value>-0.09</value>
       </product>
    </function>

    <function name="aero/coefficient/CLde">
       <description>Lift_due_to_Elevator_Deflection</description>
       <product>
           <property>aero/qbar-psf</property>
           <property>metrics/Sw-sqft</property>
           <property>fcs/elevator-pos-rad</property>
           <value>0.18</value>
       </product>
    </function>
  </axis>

  <axis name="DRAG">

    <function name="aero/coefficient/CD0">
       <description>Drag_at_zero_lift</description>
       <product>
          <property>aero/qbar-psf</property>
          <property>metrics/Sw-sqft</property>
          <table>
            <independentVar lookup="row">aero/alpha-rad</independentVar>
            <tableData>
             -1.57    1.500
             -0.26    0.025
              0.00    0.019
              0.26    0.025
              1.57    1.500
            </tableData>
          </table>
       </product>
    </function>

    <function name="aero/coefficient/CDi">
       <description>Induced_drag</description>
         <product>
           <property>aero/qbar-psf</property>
           <property>metrics/Sw-sqft</property>
           <property>aero/cl-squared</property>
           <value>0.042</value>
         </product>
    </function>

    <function name="aero/coefficient/CDmach">
       <description>Drag_due_to_mach</description>
        <product>
          <property>aero/qbar-psf</property>
          <property>metrics/Sw-sqft</property>
          <table>
            <independentVar lookup="row">velocities/mach</independentVar>
            <tableData>
                0.00      0.000
                0.79      0.000
                1.10      0.023
                1.80      0.015
            </tableData>
          </table>
        </product>
    </function>

    <function name="aero/coefficient/CDflap">
       <description>Drag_due_to_flaps</description>
         <product>
           <property>aero/qbar-psf</property>
           <property>metrics/Sw-sqft</property>
           <property>fcs/flap-pos-deg</property>
           <value> 0.00190 </value>
         </product>
    </function>

    <function name="aero/coefficient/CDgear">
       <description>Drag_due_to_gear</description>
         <product>
           <property>aero/qbar-psf</property>
           <property>metrics/Sw-sqft</property>
           <property>gear/gear-pos-norm</property>
           <value>0.013</value>
         </product>
    </function>

    <function name="aero/coefficient/CDsb">
       <description>Drag_due_to_speedbrakes</description>
         <product>
           <property>aero/qbar-psf</property>
           <property>metrics/Sw-sqft</property>
           <property>fcs/speedbrake-pos-norm</property>
           <value>0.019</value>
         </product>
    </function>

    <function name="aero/coefficient/CDsp">
       <description>Drag_due_to_spoiler</description>
         <product>
           <property>aero/qbar-psf</property>
           <property>metrics/Sw-sqft</property>
           <property>fcs/spoiler-pos-norm</property>
           <value>0.019</value>
         </product>
    </function>

    <function name="aero/coefficient/CDbeta">
       <description>Drag_due_to_sideslip</description>
       <product>
          <property>aero/qbar-psf</property>
          <property>metrics/Sw-sqft</property>
          <table>
            <independentVar lookup="row">aero/beta-rad</independentVar>
            <tableData>
              -1.57       1.230
              -0.26    0.050
               0.00       0.000
               0.26    0.050
               1.57       1.230
            </tableData>
          </table>
       </product>
    </function>

    <function name="aero/coefficient/CDde">
       <description>Drag_due_to_Elevator_Deflection</description>
       <product>
           <property>aero/qbar-psf</property>
           <property>metrics/Sw-sqft</property>
           <abs><property>fcs/elevator-pos-norm</property></abs>
           <value>0.04</value>
       </product>
    </function>

  </axis>

  <axis name="SIDE">

    <function name="aero/coefficient/CYb">
       <description>Side_force_due_to_beta</description>
       <product>
           <property>aero/qbar-psf</property>
           <property>metrics/Sw-sqft</property>
           <property>aero/beta-rad</property>
           <value>-1</value>
       </product>
    </function>

  </axis>

  <axis name="ROLL">

    <function name="aero/coefficient/Clb">
       <description>Roll_moment_due_to_beta</description>
       <product>
           <property>aero/qbar-psf</property>
           <property>metrics/Sw-sqft</property>
           <property>metrics/bw-ft</property>
           <property>aero/beta-rad</property>
           <value>-0.1</value>
       </product>
    </function>

    <function name="aero/coefficient/Clp">
       <description>Roll_moment_due_to_roll_rate</description>
       <product>
           <property>aero/qbar-psf</property>
           <property>metrics/Sw-sqft</property>
           <property>metrics/bw-ft</property>
           <property>aero/bi2vel</property>
           <property>velocities/p-aero-rad_sec</property>
           <value>-0.4</value>
       </product>
    </function>

    <function name="aero/coefficient/Clr">
       <description>Roll_moment_due_to_yaw_rate</description>
       <product>
           <property>aero/qbar-psf</property>
           <property>metrics/Sw-sqft</property>
           <property>metrics/bw-ft</property>
           <property>aero/bi2vel</property>
           <property>velocities/r-aero-rad_sec</property>
           <value>0.15</value>
       </product>
    </function>

    <function name="aero/coefficient/Clda">
       <description>Roll_moment_due_to_aileron</description>
       <product>
          <property>aero/qbar-psf</property>
          <property>metrics/Sw-sqft</property>
          <property>metrics/bw-ft</property>
          <property>fcs/left-aileron-pos-rad</property>
          <table>
            <independentVar lookup="row">velocities/mach</independentVar>
            <tableData>
              0.0    0.100
              2.0    0.033
            </tableData>
          </table>
       </product>
    </function>

    <function name="aero/coefficient/Cldr">
       <description>Roll_moment_due_to_rudder</description>
       <product>
           <property>aero/qbar-psf</property>
           <property>metrics/Sw-sqft</property>
           <property>metrics/bw-ft</property>
           <property>fcs/rudder-pos-rad</property>
           <value>0.01</value>
       </product>
    </function>

  </axis>

  <axis name="PITCH">

    <function name="aero/coefficient/Cmalpha">
       <description>Pitch_moment_due_to_alpha</description>
       <product>
           <property>aero/qbar-psf</property>
           <property>metrics/Sw-sqft</property>
           <property>metrics/cbarw-ft</property>
           <property>aero/alpha-rad</property>
           <value>-0.6</value>
       </product>
    </function>

    <function name="aero/coefficient/Cmde">
       <description>Pitch_moment_due_to_elevator</description>
       <product>
          <property>aero/qbar-psf</property>
          <property>metrics/Sw-sqft</property>
          <property>metrics/cbarw-ft</property>
          <property>fcs/elevator-pos-rad</property>
          <table>
            <independentVar lookup="row">velocities/mach</independentVar>
            <tableData>
              0.0     -1.200
              2.0     -0.300
            </tableData>
          </table>
       </product>
    </function>

    <function name="aero/coefficient/Cmq">
       <description>Pitch_moment_due_to_pitch_rate</description>
       <product>
           <property>aero/qbar-psf</property>
           <property>metrics/Sw-sqft</property>
           <property>metrics/cbarw-ft</property>
           <property>aero/ci2vel</property>
           <property>velocities/q-aero-rad_sec</property>
           <value>-17</value>
       </product>
    </function>

    <function name="aero/coefficient/Cmadot">
       <description>Pitch_moment_due_to_alpha_rate</description>
       <product>
           <property>aero/qbar-psf</property>
           <property>metrics/Sw-sqft</property>
           <property>metrics/cbarw-ft</property>
           <property>aero/ci2vel</property>
           <property>aero/alphadot-rad_sec</property>
           <value>-6</value>
       </product>
    </function>

  </axis>

  <axis name="YAW">

    <function name="aero/coefficient/Cnb">
       <description>Yaw_moment_due_to_beta</description>
       <product>
           <property>aero/qbar-psf</property>
           <property>metrics/Sw-sqft</property>
           <property>metrics/bw-ft</property>
           <property>aero/beta-rad</property>
           <value>0.12</value>
       </product>
    </function>

    <function name="aero/coefficient/Cnr">
       <description>Yaw_moment_due_to_yaw_rate</description>
       <product>
           <property>aero/qbar-psf</property>
           <property>metrics/Sw-sqft</property>
           <property>metrics/bw-ft</property>
           <property>aero/bi2vel</property>
           <property>velocities/r-aero-rad_sec</property>
           <value>-0.15</value>
       </product>
    </function>

    <function name="aero/coefficient/Cndr">
       <description>Yaw_moment_due_to_rudder</description>
       <product>
           <property>aero/qbar-psf</property>
           <property>metrics/Sw-sqft</property>
           <property>metrics/bw-ft</property>
           <property>fcs/rudder-pos-rad</property>
           <value>-0.1</value>
       </product>
    </function>

    <function name="aero/coefficient/Cnda">
       <description>Adverse_yaw</description>
       <product>
           <property>aero/qbar-psf</property>
           <property>metrics/Sw-sqft</property>
           <property>metrics/bw-ft</property>
           <property>fcs/left-aileron-pos-rad</property>
           <value>0</value>
       </product>
    </function>

  </axis>

 </aerodynamics>

 <external_reactions>
  <force name="pushback" frame="BODY">
   <location unit="IN">
    <x>  -139 </x>
    <y>    0.0 </y>
    <z>  -71.0 </z>
   </location>
   <direction>
    <x>1</x>
    <y>0</y>
    <z>0</z>
   </direction>
  </force>
 </external_reactions>

</fdm_config>
